<Lems>

<!-- Specify which component to run -->
<Target component="sim1"/>

<!-- Include core NeuroML2 ComponentType definitions -->
<Include file="Cells.xml"/>
<Include file="Networks.xml"/>
<Include file="Simulation.xml"/>

<!-- parameter set for relaxation oscillator -->
<fitzHughNagumo1969Cell id="fn1" a="0.7" b="0.08" I="1.0" phi="0.08"
    V0="0.0" W0="0.0"/>

<network id="net1">
    <population id="fn1pop" component="fn1" size="1"/>
</network>

<Simulation id="sim1" length="400ms" step="0.01ms" target="net1">

    <Display id="d1" title="dynamical variable timeseries"
        timeScale="1ms" xmin="0" xmax="400" ymin="-3" ymax="3">
        <Line id ="V" quantity="fn1pop[0]/V" scale="1"
            color="#000000" timeScale="1ms"/>
        <Line id ="W" quantity="fn1pop[0]/W" scale="1"
            color="#ff0000" timeScale="1ms"/>
    </Display>

    <OutputFile id="of0" fileName="./fhn.dat">
      <OutputColumn id="V" quantity="fn1pop[0]/V"/>
      <OutputColumn id="W" quantity="fn1pop[0]/W"/>
    </OutputFile>

</Simulation>

</Lems>
